// COMSOL Multiphysics 4.1 (Build: 88) model "comsol_WGtest_liten.mph"
// Outline of the model tree

Parameters
  nguide = 2.15  // Used for waveguide
  nsuper = 1.345  // Used for superstrate
  nsub = 1.4457  // Used for silica
  epsilonsuper = nsuper*nsuper  // Used for superstrate
  lambda0_rfw = 1.07e-6[m]  // Wavelength

Variables
  var1 "Variables 1"
    n1 = dnx
    n2 = dny
    n3 = dnz
    nTxx = 0.5*real(epsilon0_const*epsilonsuper*real(Ex*conj(Ex))+real(emw.Bx*conj(emw.Bx))/mu0_const-0.5*(epsilon0_const*epsilonsuper*emw.normE^2+emw.normB^2/mu0_const))*dnx
    nTxy = 0.5*real(epsilon0_const*epsilonsuper*real(Ex*conj(Ey))+real(emw.Bx*conj(emw.By))/mu0_const)*dny
    nTxz = 0.5*real(epsilon0_const*epsilonsuper*real(Ex*conj(Ez))+real(emw.Bx*conj(emw.Bz))/mu0_const)*dnz
    nTyx = 0.5*real(epsilon0_const*epsilonsuper*real(Ey*conj(Ex))+real(emw.By*conj(emw.Bx))/mu0_const)*dnx
    nTyy = 0.5*real(epsilon0_const*epsilonsuper*real(Ey*conj(Ey))+real(emw.By*conj(emw.By))/mu0_const-0.5*(epsilon0_const*epsilonsuper*emw.normE^2+emw.normB^2/mu0_const))*dny
    nTyz = 0.5*real(epsilon0_const*epsilonsuper*real(Ey*conj(Ez))+real(emw.By*conj(emw.Bz))/mu0_const)*dnz
    nTzx = 0.5*real(epsilon0_const*epsilonsuper*real(Ez*conj(Ex))+real(emw.Bz*conj(emw.Bx))/mu0_const)*dnx
    nTzy = 0.5*real(epsilon0_const*epsilonsuper*real(Ez*conj(Ey))+real(emw.Bz*conj(emw.By))/mu0_const)*dny
    nTzz = 0.5*real(epsilon0_const*epsilonsuper*real(Ez*conj(Ez))+real(emw.Bz*conj(emw.Bz))/mu0_const-0.5*(epsilon0_const*epsilonsuper*emw.normE^2+emw.normB^2/mu0_const))*dnz

Selections
  sel1 "Sphere"

Geometry
  geom1 "Geometry 1" (3D, length unit m)
    blk1: Block | pos = {-0.75e-6, -1e-6, 0}; base = corner; size = {1.5e-6, 3e-6, 0.2e-6}
    blk2: Block | pos = {-2.5e-6, -1e-6, -2e-6}; ax3 = {0, 0, 1}; base = corner; size = {5e-6, 3e-6, 2e-6}
    blk3: Block | pos = {-2.5e-6, -1e-6, 0}; size = {5e-6, 3e-6, 2e-6}
    blk4: Block | pos = {-2.5e-6, 1e-6, -2e-6}; size = {5e-6, 1e-6, 4e-6}
    sph1: Sphere (disabled) | pos = {0, 0.7e-6, 0.7e-6}; r = 0.5e-6
    blk5: Block | pos = {-2.5e-6, -1e-6, 1.5e-6}; size = {5e-6, 3e-6, 0.5e-6}
    blk6: Block | pos = {-2.5e-6, -1e-6, -2e-6}; size = {5e-6, 3e-6, .5e-6}
    fin: Finalize "Form Union"

Materials
  mat4 "Silica, user def."
    def "Basic"
      electricconductivity = 0
      relpermittivity = nsub^2
      relpermeability = 1
    RefractiveIndex
      n = nsub
      ki = 0
  mat5 "Ta2O5"
    def "Basic"
      electricconductivity = 0
      relpermittivity = nguide^2
      relpermeability = 1
    RefractiveIndex
      n = nguide
      ki = 0
  mat6 "Superstrate"
    def "Basic"
      electricconductivity = 0
      relpermittivity = epsilonsuper
      relpermeability = 1
    RefractiveIndex
      n = nsuper
      ki = 0
  mat7 "Red blood cell"
    RefractiveIndex
      n = 1.38
      ki = 0

Physics
  emw: ElectromagneticWaves
    dependent variable E = {Ex, Ey, Ez}
    EquationForm.form = Automatic
    EquationForm.freq_src = userdef
    EquationForm.freq = 1e9[Hz]
    EquationForm.modeFreq = 3e8/1e-6
    wee1: WaveEquationElectric | DisplacementFieldModel = RefractiveIndex
    pec1: PerfectElectricConductor
    init1: init "Initial Values 1"
    pmc1: PerfectMagneticConductor
    port1: Port | PortExcitation = on; PortType = Numeric
    pml1: PML "Perfectly Matched Layers 1" | ScalingType = Cartesian
      wee1: WaveEquationElectric | DisplacementFieldModel = RefractiveIndex
      msc1: ManualScaling (disabled) | adir = {0, 1, 0}; deltar = 0.6e-6[m]; rI = {0, 2.4e-6, 0}
    sctr1: Scattering "Scattering Boundary Condition 1"
    pml2: PML "Perfectly Matched Layers 2" | ScalingType = Cartesian
      wee1: WaveEquationElectric
      msc1: ManualScaling (disabled) | adir = {0, 0, 1}; deltar = 5e-07; rI = {-2.5E-6, 0, 1.5E-6}

Mesh
  mesh2 "Mesh 2"
    size: MeshSizeDefault | hgrad = 1.5; hauto = 5; custom = off
    ftri1: FreeTri "Free Triangular 1"
      size1: Size | hmax = 10E-8; hauto = 2; custom = on
      size2: Size | hmax = 5.0E-8; hauto = 5; custom = on
      size3: Size | hgrad = 1.25; hauto = 5; custom = on
    ftet2: FreeTet "Free Tetrahedral 2"
      size1: Size | hgrad = 1.25; hauto = 5; custom = on

Studies
  std2 "Study 2"
    bma1: BoundaryModeAnalysis | mesh = {geom1, mesh2}; neigs = 1; shift = 1.76; modeFreq = 3e8/lambda0_rfw
    freq1: Frequency "Frequency Domain" | mesh = {geom1, mesh2}; plist = 3e8[m/s]/lambda0_rfw

Solver configurations
  sol3 "Solver 3" (study std2)
    v1: Variables "Dependent Variables 1"
    e1: Eigenvalue "Eigenvalue Solver 1" | neigs = 1; transform = effective_mode_index; shift = 1.76
      dDef: Direct
    su1: StoreSolution
    v2: Variables "Dependent Variables 2" | initmethod = sol; notsolmethod = sol
    s1: Stationary "Stationary Solver 1"
      dDef: Direct | linsolver = spooles; mumpsalloc = 10; ooc = on; oocmemory = 512
      p1: Parametric | pname = freq; plist = 3e8[m/s]/lambda0_rfw
      fc1: FullyCoupled | linsolver = dDef
  sol4 "Store Solution 4" (study std2)

Datasets
  dset3: Solution | solution = sol3
  dset4: Solution | solution = sol4
  mesh2: Mesh | mesh = mesh2

Derived values
  int1: IntSurface "Fx, Surface Integration 1" | data = dset3; table = new; expr = nTxx+nTxy+nTxz
  int2: IntSurface "Fy, Surface Integration 2" | data = dset3; table = new; expr = nTyx+nTyy+nTyz
  int3: IntSurface "Fz, Surface Integration 3" | data = dset3; table = new; expr = nTzx+nTzy+nTzz
  int4: IntSurface "Surface Integration 4" | data = dset3; table = new; expr = emw.dnTx
  int5: IntSurface "Surface Integration 5" | data = dset3; table = new; expr = emw.dnTy
  int6: IntSurface "Surface Integration 6" | data = dset3; table = new; expr = emw.dnTz

Plots
  pg3: PlotGroup3D "3D Plot Group 3" | data = dset4
    surf1: Surface | expr = emw.normEbm_1; wireframe = off
  pg4: PlotGroup3D "3D Plot Group 4" | data = dset3
    slc1: Slice (disabled)
      expr = emw.normE
      quickplane = xy
      quickzmethod = coord
      quickxmethod = coord
      genpoints = {{0, 0, 0}, {1, 0, 0}, {0, 1, 0}}
    slc2: Slice
      expr = emw.normE
      quickplane = yz
      quickzmethod = coord
      quickxmethod = coord
      genpoints = {{0, 0, 0}, {1, 0, 0}, {0, 1, 0}}
    slc3: Slice (disabled)
      expr = emw.normE
      quickplane = zx
      quickzmethod = coord
      quickxmethod = coord
      quickymethod = coord
      quicky = 1.9e-6
      genpoints = {{0, 0, 0}, {1, 0, 0}, {0, 1, 0}}
  pg5: PlotGroup3D "3D Plot Group 5" | data = dset3
    arws1: ArrowSurface (disabled) | expr = {dnx, dny, dnz}; arrowlength = proportional; arrowscale = 1; arrowfrac = 1
    arws2: ArrowSurface (disabled) | expr = {down(Ex), down(Ex), down(Ex)}; arrowlength = proportional; arrowscale = 0.6
    arws3: ArrowSurface (disabled) | expr = {up(Ex), up(Ex), up(Ex)}; arrowlength = proportional; arrowscale = 0.6
    arws4: ArrowSurface (disabled) | expr = {Ex, Ex, Ex}; arrowlength = proportional; arrowscale = 0.6; arrowfrac = 1
    arws5: ArrowSurface (disabled) | expr = {emw.unTx, emw.unTy, emw.unTz}; arrowlength = normalized
    iso1: Isosurface | expr = emw.normE; levelmethod = levels; levels = 1e6
  pg6: PlotGroup3D "3D Plot Group 6" | data = mesh2
    mesh2: Mesh | meshdomain = volume; elemtype3 = tet; elemfilter = random; tetkeep = 0.01